v_0 := 181.477
R := 25 = 25
a_0 := 1.443
h_0 := 254.335
a_0 = 82.6778 deg
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π = 3.14159
v := 0, 0.1 .. 2*v_0
ln(v/v_0) == R/(2*9.81)*ln((1 - cos(a))/(1 + cos(a))*(1 + cos(a_0))/(1 - cos(a_0))) + ln(sin(a_0)/sin(a))
a := 1
Given
v/v_0 == ((1 - cos(a))/(1 + cos(a))*(1 + cos(a_0))/(1 - cos(a_0)))^(R/(2*9.81))*sin(a_0)/sin(a)
A(v) := Find(a)
A2(v) := asin(v_0*sin(a_0)/v)
A(10)/π*180 = 21.6758
A(10) = 0.378314
A2(10)/π*180 = 90 - 205.275i
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ah(v) := R*cos(A(v)) + (-9.81)
al(v) := -R*sin(A(v))
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vh(v) := -v*cos(A(v))
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H := 9
l_0 := 0
h(v) := h_0 - integral(-v1*cos(A(v1))/(-R + 9.81*cos(A(v1))), v1 = v .. v_0)
l(v) := l_0 + integral(v1*sin(A(v1))/(-R + 9.81*cos(A(v1))), v1 = v_0 .. v)
h1(l) := h_0 - cot(a_0)*(l - l_0) - 9.81*(l - l_0)^2/(2*v_0^2*sin(a_0)^2)
h(0) = -0.125771
ha(a2) := integral(((1 - cos(a1))/(1 + cos(a1))*(1 + cos(a_0))/(1 - cos(a_0)))^(R/9.81)*sin(a_0)^2/sin(a1)^2*v_0^2/9.81*cos(a1)/sin(a1), a1 = a2 .. a_0)
ha(0) = 254.461
106.051
105.939
N := 10000
i := 1, 2 .. N
ai[i] := a_0/N*i
sum(((1 - cos(ai[i]))/(1 + cos(ai[i]))*(1 + cos(a_0))/(1 - cos(a_0)))^(R/9.81)*sin(a_0)^2/sin(ai[i])^2*v_0^2/9.81*cos(ai[i])/sin(ai[i]), i)*a_0/N = 254.492
sum(((48/(ai[i]^4 - 12*ai[i]^2 + 48) - 1)*(1 + cos(a_0))/(1 - cos(a_0)))^(R/9.81)*sin(a_0)^2*v_0^2/9.81*(-72000*(ai[i]^4 - 12*ai[i]^2 + 24)/(ai[i]^3*(ai[i]^4 + 20*ai[i]^2 - 120)^3)), i)*a_0/N = 289.013
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v_0 = 181.477
atan(20/sqrt(5^2 + 40^2)) = 26.3878 deg
ha(a2) := integral(((1 - cos(a1))/(1 + cos(a1))*(1 + cos(a_0))/(1 - cos(a_0)))^(R/9.81)*sin(a_0)^2/sin(a1)^2*v_0^2/9.81*cos(a1)/sin(a1), a1 = a2 .. a_0)
ha(0) = 254.461
π/2 = 1.5708
N := 10000
i := 1, 2 .. N
ai[i] := a_0/N*i
sum(((1 - cos(ai[i]))/(1 + cos(ai[i]))*(1 + cos(a_0))/(1 - cos(a_0)))^(R/9.81)*sin(a_0)^2/sin(ai[i])^2*v_0^2/9.81*cos(ai[i])/sin(ai[i]), i)*a_0/N = 254.492
h_0 - 60.977 = 193.358
sum(((48/(ai[i]^4 - 12*ai[i]^2 + 48) - 1)*(1 + cos(a_0))/(1 - cos(a_0)))^(R/9.81)*sin(a_0)^2*v_0^2/9.81*(-72000*(ai[i]^4 - 12*ai[i]^2 + 24)/(ai[i]^3*(ai[i]^4 + 20*ai[i]^2 - 120)^3)), i)*a_0/N = 289.013
h_0 - 61.74 = 192.595
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